<?xml version="1.0"?>
<propeller name="prop">
    <ixx> 0.0001 </ixx>
    <diameter unit="IN"> 10 </diameter>
    <numblades> 2 </numblades>
    <gearratio> 1.0 </gearratio>
    <p_factor> 1.0 </p_factor>
    <table name="C_THRUST" type="internal">
        <tableData>
            0.0   0.1
            0.1   0.09
            0.5   0.05
            1.0   0.01
        </tableData>
    </table>
</propeller>
